VAX := READPRN("f:\OE 2qrs\circuit1.DNO")
Id3 := max(VAX[:, 1]) = 0.367094
nMAX := match(Id3, VAX[:, 1]) = [50]
Ud3 := VAX[:, 0][50]
VAX[:, 1] = [
    0; 4e-11; 1.2e-10; 2.9e-10; 6.7e-10; 1.48e-9; 3.25e-9; 7.07e-9; 1.535e-8; 3.329e-8
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]
VAX[:, 0] = [
    0; 0.019996; 0.039992; 0.059988; 0.079984; 0.09998; 0.119976; 0.139972; 0.159968; 0.179964
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]
Ud3 = 0.632779
nId1 := match(Id3/4, VAX[:, 1])  # error: Подходящие значения не найдены.
nId2 := match(Id3/2, VAX[:, 1])  # error: Подходящие значения не найдены.
Id1 := Id3/4 = 0.0917736
Id2 := Id3/2 = 0.183547
Ud1 := linterp(VAX[:, 1], VAX[:, 0], Id3/4) = 0.571803
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Ud2 := linterp(VAX[:, 1], VAX[:, 0], Id3/2) = 0.598128
Rb := (Ud1 - 2*Ud2 + Ud3)/Id1 = 0.0907319
NFt := ((3*Ud2 - 2*Ud1) - Ud3)/ln(2) = 0.0259652
Is0 := Id1*exp(-1/NFt*(2*Ud1 - Ud3)) = 2.62182e-10
x := 10^-0
Rb := 91.07*10^-3
m := 1
Ft := 0.5
IS := 31.69*10^-12
F(x) := x*Rb + ln((IS + x)/IS)*m*Ft
F(x) = 12.1786
Given
0.510 == 0.011*Rb + ln((IS + 0.011)/IS)*m*Ft
0.551 == 0.048*Rb + ln((IS + 0.048)/IS)*m*Ft
0.601 == 0.198*Rb + ln((IS + 0.198)/IS)*m*Ft
0.627 == 0.333*Rb + ln((IS + 0.333)/IS)*m*Ft
Diod_P := Minerr(IS, Rb, m, Ft) = [2.20993e-11; 0.0940075; 0.972468; 0.0261364]
Проверка
Id := 0.011
F(Id) := Id*Diod_P[1] + ln((Diod_P[0] + Id)/Diod_P[0])*Diod_P[2]*Diod_P[3]
F(Id) = 0.510021
Idiod := VAX[:, 1]
Rb = 0.09107
NFt = 0.0259652
Is0 = 2.62182e-10
Udiod(diod) := Idiod*Rb + NFt*ln((Idiod + Is0)/Is0)
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