i := 0 .. 10
Fmax[i] := 481137, 486271, 488404, 489704, 490621, 491321, 491888, 492376, 492738, 493088, 493288
Vvar[i] := 1, 4, 7, 10, 13, 16, 19, 22, 25, 28, 30
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Fr == 1/(2*pi*sqrt((Ck + Cd)*Lk))
Lk := 10^-3
Ck := 10^-10
Fr[i] := Fmax[i]
pi := 3.14
Cd := -(Ck*Lk - 1/(4*Fr^2*pi^2))/Lk
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M := 0.5
VJ0 := 0.6
CJ0 := 10^-12
Given
(9.533*10^-12) == CJ0*(1 - 1/VJ0)^(-M)
(5.039*10^-12) == CJ0*(1 - 16/VJ0)^(-M)
Vvar = [1; 4; 7; 10; 13; 16; 19; 22; 25; 28; 30]
Cd = [9.53255e-12; 7.23189e-12; 6.29731e-12; 5.7337e-12; 5.33882e-12; 5.03887e-12; 4.79686e-12; 4.58923e-12; 4.43561e-12; 4.2874e-12; 4.20285e-12]
(4.797*10^-12) == CJ0*(1 - 19/VJ0)^(-M)
(4.287*10^-12) == CJ0*(1 - 28/VJ0)^(-M)
Res := Minerr(CJ0, VJ0, M)
Res = [1.16054e-11 + 5.5097e-25i; -1.0987 + 2.0458e-13i; 0.303947 - 1.24662e-14i]
CJ0 := Res[0]
VJ0 := Res[1]
M := Res[2]
Cd1 := CJ0*(1 - Vvar/VJ0)^(-M)
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